// SBML level 3 version 1

model IDModel()

  // Compartments:
  compartment default_compartment = 1;
  compartment comp1 = 1;

  // Species:
  species glucose in comp1 = 10*V;
  species biomass in comp1 = biomass_init*V;
  species serine in comp1 = 0;
  species V in default_compartment = 0.1021;

  // Parameters:
  mu_max = 0.2477;
  Ks = 1.4344;
  Ks_qs = 2.6784;
  Ki = 688309;
  qs_max = 1.4075;
  F0 = 0.3;
  mu_set = 0.02;
  alpha = 1.5007;
  beta = 2.7714;
  switch = 0;
  IPTG = 0;
  biomass_init = 0.15;
  c_glufeed = 415;

  // Assignment rules:
  Fin := switch*F0*exp(mu_set*time)/1000;
  c_glucose := glucose/V;
  c_biomass := biomass/V;
  mu := mu_max*c_glucose/(c_glucose + Ks + c_glucose^2/Ki);
  qs := qs_max*c_glucose/(Ks_qs + c_glucose);
  qp := alpha*mu/(mu + beta);
  yield := serine/glucose;
  qpbio := qp*biomass;

  // Reactions:
  EqVolume: -> V; Fin;
  eq_biomass: -> biomass; mu*biomass;
  eq_glucose: -> glucose; -qs*biomass + Fin*c_glufeed;  // modifiers: biomass
  eq_serine: -> serine; qp*biomass*IPTG;  // modifiers: biomass

  // Events:
  _E0: at (time > 12.5): IPTG = 1, switch = 1;
end
