// SBML level 3 version 1

model IDModel()

  // Compartments:
  compartment comp1 = 1;

  // Species:
  species glucose in comp1 = 8.254856e-6*1000;
  species serine in comp1 = 0.00434642;
  species biomass in comp1 = 5.538306e-7*1000;

  // Parameters:
  alpha = 29.1;
  beta = 68.8;
  mu_max = 0.98;
  kc = 7.48;
  a = -0.2572;
  b = -0.7651;
  ms = -0.0046;
  v0 = 0.00010428;

  // Assignment rules:
  v := 0.00010303 - 1.21e-6*time;
  c_glucose := glucose/v;
  c_biomass := biomass/v;
  mu := mu_max*(c_glucose/(kc*c_biomass + c_glucose));
  qp_s := alpha*mu/(beta + mu);
  qs_g := a*mu + b*qp_s + ms;
  rp_s := qp_s*biomass;
  r_s := qs_g*biomass;

  // Reactions:
  eq_biomass: -> biomass; mu*biomass;
  eq_serine: -> serine; rp_s;
  eq_glucose: -> glucose; r_s;
end
